<?xml version="1.0"?>
<?xml-stylesheet type="text/xsl" href="http://jsbsim.sourceforge.net/JSBSim.xsl"?>

<fdm_config name="727-200" version="2.0" release="ALPHA"
xmlns:xsi="http://www.w3.org/2001/XMLSchema-instance"
xsi:noNamespaceSchemaLocation="http://jsbsim.sourceforge.net/JSBSim.xsd">

	<fileheader>
		<author>Joshua Davidson (it0uchpods)</author>
		<version>Pre V1.0</version>
		<description>Boeing 727-2XX FDE</description>
	</fileheader>

	<metrics>
		<wingarea  unit="FT2"> 1650.00 </wingarea>
		<wingspan  unit="FT" >  108.00 </wingspan>
		<wing_incidence>          2.00 </wing_incidence>
		<chord     unit="FT" >   15.28 </chord>
		<htailarea unit="FT2">  412.50 </htailarea>
		<htailarm  unit="FT" >   35.75 </htailarm>
		<vtailarea unit="FT2">  330.00 </vtailarea>
		<vtailarm  unit="FT" >   34.00 </vtailarm>
		<location name="AERORP" unit="IN">
			<x> -13.4626 </x>
			<y> 0.00    </y>
			<z> 25.2535 </z>
		</location>
		<location name="EYEPOINT" unit="IN">
			<x> -829.4645669 </x>
			<y> -23.31299213 </y>
			<z> 47.2842 </z>
		</location>
		<location name="VRP" unit="IN">
			<x>0</x>
			<y>0</y>
			<z>-104</z>
		</location>
	</metrics>

	<mass_balance>
		<ixx unit="SLUG*FT2">    582408 </ixx>
		<iyy unit="SLUG*FT2">   2429029 </iyy>
		<izz unit="SLUG*FT2">   3009335 </izz>
		<emptywt unit="LBS" >    102900 </emptywt>
		<location name="CG" unit="IN">
			<x> -22.7724 </x>
			<y> 0.00 </y>
			<z> 25.2535 </z>
		</location>

		<pointmass name="Cockpit Crew">
			<description>Cockpit Crew, 3 persons</description>
			<weight unit="LBS">  600.0000 </weight>
			<location name="CREW" unit="IN">
			<x> -829.4645669 </x>
			<y> 0.00 </y>
			<z> 47.2842 </z>
			</location>
		</pointmass>

		<pointmass name="First Class">
			<description>First Class, 12 persons</description>
			<weight unit="LBS"> 3200.0000 </weight>
			<location name="CREW" unit="IN">
				<x> -22.7724 </x>
				<y> 0.00    </y>
				<z> 25.2535 </z>
			</location>
		</pointmass>

		<pointmass name="Coach Class">
			<description>Coach Class, 111 persons</description>
			<weight unit="LBS"> 22200.0000 </weight>
			<location name="Tech ops" unit="IN">
				<x> -22.7724 </x>
				<y> 0.00    </y>
				<z> 25.2535 </z>
			</location>
		</pointmass>

	</mass_balance>

	<ground_reactions>

		<contact type="BOGEY" name="NOSE">
			<location unit="IN">
				<x> -756.6102 </x>
				<y>   0.00 </y>
				<z> -210.5600 </z>
			</location>
			<static_friction>  0.80 </static_friction>
			<dynamic_friction> 0.50 </dynamic_friction>
			<rolling_friction> 0.02 </rolling_friction>
			<spring_coeff unit="LBS/FT"> 30935.5 </spring_coeff>
			<damping_coeff unit="LBS/FT/SEC"> 16978.5 </damping_coeff>
			<max_steer unit="DEG"> 70.00 </max_steer>
			<brake_group>NONE</brake_group>
			<retractable>1</retractable>
		</contact>

		<contact type="BOGEY" name="LEFT_MAIN">
			<location unit="IN">
				<x> 6.7724 </x>
				<y> -126.6661 </y>
				<z> -230.5600 </z>
			</location>
			<static_friction>  0.80 </static_friction>
			<dynamic_friction> 0.50 </dynamic_friction>
			<rolling_friction> 0.02 </rolling_friction>
			<spring_coeff unit="LBS/FT"> 59785 </spring_coeff>
			<damping_coeff unit="LBS/FT/SEC"> 23957 </damping_coeff>
			<max_steer unit="DEG">0</max_steer>
			<brake_group>LEFT</brake_group>
			<retractable>1</retractable>
		</contact>

		<contact type="BOGEY" name="RIGHT_MAIN">
			<location unit="IN">
				<x> 6.7724 </x>
				<y> 126.6661 </y>
				<z> -230.5600 </z>
			</location>
			<static_friction>  0.80 </static_friction>
			<dynamic_friction> 0.50 </dynamic_friction>
			<rolling_friction> 0.02 </rolling_friction>
			<spring_coeff unit="LBS/FT"> 59785 </spring_coeff>
			<damping_coeff unit="LBS/FT/SEC"> 23957 </damping_coeff>
			<max_steer unit="DEG">0</max_steer>
			<brake_group>RIGHT</brake_group>
			<retractable>1</retractable>
		</contact>

		<contact type="STRUCTURE" name="NOSE">
			<location unit="IN">
				<x> -891.6062 </x>
				<y> 0.00 </y>
				<z> -28.3673 </z>
			</location>
			<static_friction>  1.00 </static_friction>
			<dynamic_friction> 1.00 </dynamic_friction>
			<spring_coeff unit="LBS/FT"> 50000 </spring_coeff>
			<damping_coeff unit="LBS/FT/SEC"> 50000 </damping_coeff>
		</contact>

		<contact type="STRUCTURE" name="LEFT_WING">
			<location unit="IN">
				<x> 239.8102 </x>
				<y> -639.9251 </y>
				<z> -11.8137 </z>
			</location>
			<static_friction>  1.00 </static_friction>
			<dynamic_friction> 1.00 </dynamic_friction>
			<spring_coeff unit="LBS/FT"> 50000 </spring_coeff>
			<damping_coeff unit="LBS/FT/SEC"> 50000 </damping_coeff>
		</contact>

		<contact type="STRUCTURE" name="RIGHT_WING">
			<location unit="IN">
				<x> 239.8102 </x>
				<y> 639.9251 </y>
				<z> -11.8137 </z>
			</location>
			<static_friction>  1.00 </static_friction>
			<dynamic_friction> 1.00 </dynamic_friction>
			<spring_coeff unit="LBS/FT"> 50000 </spring_coeff>
			<damping_coeff unit="LBS/FT/SEC"> 50000 </damping_coeff>
		</contact>

		<contact type="STRUCTURE" name="TAIL">
			<location unit="IN">
				<x> 668.6574 </x>
				<y> 0.00 </y>
				<z> -6.0295 </z>
			</location>
			<static_friction>  1.00 </static_friction>
			<dynamic_friction> 1.00 </dynamic_friction>
			<spring_coeff unit="LBS/FT"> 50000 </spring_coeff>
			<damping_coeff unit="LBS/FT/SEC"> 50000 </damping_coeff>
		</contact>

	</ground_reactions>

	<propulsion>

		<engine file="JT8D-17R">
			<location unit="IN">
				<x> 361.8303 </x>
				<y> -135.0791 </y>
				<z> 25.2535 </z>
			</location>
			<orient unit="DEG">
				<pitch> 0.00 </pitch>
				<roll>  0.00 </roll>
				<yaw>   0.00 </yaw>
			</orient>
			<feed>0</feed>
			<feed>1</feed>
			<thruster file="direct">
				<location unit="IN">
					<x> 361.8303 </x>
					<y> -135.0791 </y>
					<z> 25.2535 </z>
				</location>
				<orient unit="DEG">
					<pitch> 0.00 </pitch>
					<roll>  0.00 </roll>
					<yaw>   0.00 </yaw>
				</orient>
			</thruster>
		</engine>

		<engine file="JT8D-17R">
			<location unit="IN">
				<x> 669.3818 </x>
				<y> 0.00     </y>
				<z> 19.8515  </z>
			</location>
			<orient unit="DEG">
				<pitch> 0.00 </pitch>
				<roll>  0.00 </roll>
				<yaw>   0.00 </yaw>
			</orient>
			<feed>1</feed>
			<thruster file="direct">
				<location unit="IN">
					<x> 669.3818 </x>
					<y> 0.00     </y>
					<z> 19.8515  </z>
				</location>
				<orient unit="DEG">
					<pitch> 0.00 </pitch>
					<roll>  0.00 </roll>
					<yaw>   0.00 </yaw>
				</orient>
			</thruster>
		</engine>

		<engine file="JT8D-17R">
			<location unit="IN">
				<x> 361.8303 </x>
				<y> 135.0791 </y>
				<z> 25.2535 </z>
			</location>
			<orient unit="DEG">
				<pitch> 0.00 </pitch>
				<roll>  0.00 </roll>
				<yaw>   0.00 </yaw>
			</orient>
			<feed>2</feed>
			<feed>1</feed>
			<thruster file="direct">
				<location unit="IN">
					<x> 361.8303 </x>
					<y> 135.0791 </y>
					<z> 25.2535 </z>
				</location>
				<orient unit="DEG">
					<pitch> 0.00 </pitch>
					<roll>  0.00 </roll>
					<yaw>   0.00 </yaw>
				</orient>
			</thruster>
		</engine>

		<tank type="FUEL" number="0"> <!-- Left Wing -->
			<location unit="IN">
				<x> -22.7724 </x>
				<y> -251.0074 </y>
				<z> -18.4531 </z>
			</location>
			<priority>2</priority>
			<capacity unit="LBS"> 13230 </capacity>
			<contents unit="LBS">  6000 </contents>
		</tank>

		<tank type="FUEL" number="1"> <!-- Center -->
			<location unit="IN">
				<x> -22.7724 </x>
				<y>   0.00 </y>
				<z> -18.4531 </z>
			</location>
			<priority>1</priority>
			<capacity unit="LBS"> 30233 </capacity>
			<contents unit="LBS">  8000 </contents>
		</tank>

		<tank type="FUEL" number="2"> <!-- Right Wing -->
			<location unit="IN">
				<x> -22.7724 </x>
				<y> 251.0074 </y>
				<z> -18.4531 </z>
			</location>
			<priority>2</priority>
			<capacity unit="LBS"> 13230 </capacity>
			<contents unit="LBS">  6000 </contents>
		</tank>

	</propulsion>

	<system file="pushback" />
	<system file="fcs" />

	<flight_control name="none" />

	<aerodynamics file="Systems/b722-aerodynamics.xml" />

	<external_reactions>
		<force name="pushback" frame="BODY">
			<location unit="IN">
				<x>294</x>
				<y>0</y>
				<z>-149</z>
			</location>
			<direction>
				<x>1</x>
				<y>0</y>
				<z>0</z>
			</direction>
		</force>
	</external_reactions>
</fdm_config>
